// SBML level 2 version 4

model nameless()

  // Compartments:
  // calculated as (width of linning layer)*(lunf surface area) = (0.1 - 0.3 um)*(66 - 75 m)
  compartment Vol_alv = 0.014 _L; Vol_alv is "Volume of surfactant linning alveolar surface";

  // Species:
  // calculated on the basis of total type II pneumocytes number per lungs (see ref) and volume of lung surfactant equal to 0.014L
  species PC in Vol_alv = 2643000000; PC is "concentration of PC type II (Pneumocytes free of virus) in alveoli";  // substance in _kcell
  species iPC in Vol_alv = 1; iPC is "concentration of iPC (Pneumocytes with virus entered but w/o virus replication) in alveoli";  // substance in _kcell
  species vPC in Vol_alv = 1; vPC is "concentration of vPC (Pneumocytes with virus actively replicated) in alveoli";  // substance in _kcell
  // estimate for type II pneumocytes was taken
  species $PC_hs_ss in Vol_alv = 2643000000; PC_hs_ss is "concentration of PC type II at steady state w/o virus exposure";  // substance in _kcell
  // based on 1e4 ACE2 per cell
  substanceOnly species ACE2_pc in Vol_alv = 615; ACE2_pc is "amount of ACE2 located at PC";  // substance in _pmole
  // based on 1e4 ACE2 per cell and total PC II number in lungs equal to 37e9 [7103258]
  substanceOnly species $ACE2_pc_hs_ss in Vol_alv = 615; ACE2_pc_hs_ss is "amount of ACE2 located at PC";  // substance in _pmole
  substanceOnly species COV_ACE2_pc in Vol_alv = 0; COV_ACE2_pc is "amount of COV_ACE2 complexes located at PC";  // substance in _pmole
  substanceOnly species ACE2_ipc in Vol_alv = 0; ACE2_ipc is "amount of ACE2 located at iPC";  // substance in _pmole
  substanceOnly species COV_ACE2_ipc in Vol_alv = 0; COV_ACE2_ipc is "amount of COV_ACE2 complexes located at iPC";  // substance in _pmole
  substanceOnly species COV_ipc in Vol_alv = 0; COV_ipc is "amount of partially disrupted COV particles ready to release RNA in cytoplasm located in iPC";  // substance in _pmole
  substanceOnly species ACE2_vpc in Vol_alv = 0; ACE2_vpc is "amount of ACE2 located at vPC";  // substance in _pmole
  substanceOnly species COV_ACE2_vpc in Vol_alv = 0; COV_ACE2_vpc is "amount of COV_ACE2 complexes located at vPC";  // substance in _pmole
  substanceOnly species COV_vpc in Vol_alv = 0; COV_vpc is "amount of partially disrupted COV particles ready to release RNA in cytoplasm located in vPC";  // substance in _pmole
  substanceOnly species COV_RNA_vpc in Vol_alv = 0; COV_RNA_vpc is "amount of COV_RNA located in vPC";  // substance in _pmole
  species COV in Vol_alv = 0.0018; COV is "concentration of COV (SARS-CoV-2 virus)";  // substance in _pM_L
  species COV_RNA in Vol_alv = 0; COV_RNA is "concentration of COV_RNA released from vPC due to their apoptosis";  // substance in _pM_L
  substanceOnly species COVass_vpc in Vol_alv = 0; COVass_vpc is "amount of assembled virus ready to be released from from vPC";  // substance in _pmole
  // hill like expression describes general kinetic pattern observed for Spike specific IgG and IgM in [32350462]
  species $anti_Ab in Vol_alv; anti_Ab is "concentration of anti-Spike attibodies";  // substance in _pM_L

  // Parameters:
  time_day has _day; time_day is "hours to days conversion";
  k_syn_ace2_pc has _pM__h; k_syn_ace2_pc is "rate of ACE2 synthesis calculated per volume of PC";
  k_tran_pc_ipc has __h; k_tran_pc_ipc is "apparent rate constant of PC to iPC transition";
  k_tran_ipc_vpc has __h; k_tran_ipc_vpc is "apparent rate constant of iPC to vPC transition";
  VO has _UL; VO is "Virus Occupancy (VO) level with anti_Ab antibodies";
  // Kd for viral Spike receptor binding domain (RBD) and ACE2 receptor is known and equal to 4.67 nM. Basing on estimate that virion includes VO*Num_sp_per_cov free spike proteins ready to bind to ACE2 we have come to the equation for apparent Kd describing binding of virion and ACE2
  Kd_cov_ace2 has _pM; Kd_cov_ace2 is "apparent dissociation equilibrium constant of COV and ACE2";
  ACE2_pc_per_cell has _item__cell; ACE2_pc_per_cell is "number of ACE2 per PC cell";
  COV_ACE2_pc_per_cell has _item__cell; COV_ACE2_pc_per_cell is "number of COV_ACE2 per PC cell";
  ACE2_ipc_per_cell has _item__cell; ACE2_ipc_per_cell is "number of ACE2 per iPC cell";
  COV_ACE2_ipc_per_cell has _item__cell; COV_ACE2_ipc_per_cell is "number of COV_ACE2 per iPC cell";
  COV_ipc_per_cell has _item__cell; COV_ipc_per_cell is "number of COV per iPC cell";
  ACE2_vpc_per_cell has _item__cell; ACE2_vpc_per_cell is "number of ACE2 per vPC cell";
  COV_ACE2_vpc_per_cell has _item__cell; COV_ACE2_vpc_per_cell is "number of COV_ACE2 per vPC cell";
  COV_vpc_per_cell has _item__cell; COV_vpc_per_cell is "number of COV per vPC cell";
  COVass_vpc_per_cell has _item__cell; COVass_vpc_per_cell is "number of COVass per vPC cell";
  COV_RNA_vpc_per_cell has _item__cell; COV_RNA_vpc_per_cell is "number of COV_RNA per vPC cell";
  COV_num_sputum_ml has __mL_item; COV_num_sputum_ml is "number of virus copies in 1 mL of sputum";
  PC_tot has _kcell__L; PC_tot is "total pneumocytes cell count";
  PC_percent has _UL; PC_percent is "percent of PC of total pneumocytes cell count";
  iPC_percent has _UL; iPC_percent is "percent of iPC of total pneumocytes cell count";
  vPC_percent has _UL; vPC_percent is "percent of vPC of total pneumocytes cell count";
  ACE2_pc_per_cell_tot has _item__cell; ACE2_pc_per_cell_tot is "total number of ACE2 molecules per PC cell";
  ACE2_ipc_per_cell_tot has _item__cell; ACE2_ipc_per_cell_tot is "total number of ACE2 molecules per iPC cell";
  ACE2_vpc_per_cell_tot has _item__cell; ACE2_vpc_per_cell_tot is "total number of ACE2 molecules per vPC cell";
  COV_pc_per_cell_tot has _item__cell; COV_pc_per_cell_tot is "total number of COV genomes per PC cell";
  COV_ipc_per_cell_tot has _item__cell; COV_ipc_per_cell_tot is "total number of COV genomes per iPC cell";
  COV_vpc_per_cell_tot has _item__cell; COV_vpc_per_cell_tot is "total number of COV genomes per vPC cell";
  steric_factor_pc has _UL; steric_factor_pc is "a term responsible for limitation of COV to cell binding; number COV molecules per cell cannot be higher than Nmax_cov_per_cell due to physical size of a cell and virus which attaches to the cell";
  steric_factor_ipc has _UL; steric_factor_ipc is "a term responsible for limitation of COV to cell binding; number COV molecules per cell cannot be higher than Nmax_cov_per_cell due to physical size of a cell and virus which attaches to the cell";
  steric_factor_vpc has _UL; steric_factor_vpc is "a term responsible for limitation of COV to cell binding; number COV molecules per cell cannot be higher than Nmax_cov_per_cell due to physical size of a cell and virus which attaches to the cell";
  COV_sgRNA_perc has _UL; COV_sgRNA_perc is "percent of actively transcribed subgenomic RNA of total (packed + unpacked) RNA in sputum samples taken from the patients";
  IR_apo has _UL; IR_apo is "empiric function imitating effect of Immune Response on vPC apoptosis";
  k_apo_vpc has __h; k_apo_vpc is "dependence of rate constant of vPC apoptosis on IR effect";
  // assumed
  switch_ir = 0 _UL; switch_ir is "switch of effect of IR on vPC apoptosis";
  kcell_to_cell = 1000 __kcell_cell;
  NA_pmole = 602000000000 __pmole_item;
  sputum_dilution_coef = 0.1 _UL;
  // the value was estimated from the HS submodel at steady state. Indeed, taking into account that (i) PC2 is precursors of PC1 [9227501], (ii) life span of PC1 is about 120 days [20616357], (iii) ratio of PC1/PC2 at steady state = 19/37 [7103258] we represented lung cell dynamics system as follows: --(Vol_alv*k_mat_pc) --> PC2 --(Vol_alv*k_dif_pc*PC2)--> PC1--(Vol_alv*k_apo_pc1*PC1)-->. Then consider the system at steady state and assuming that lifespan (T_ls) corresponds to time required for 99% of cell die we have come to following formulas: (a) k_apo_pc1 = ln(1/0.01)/(120 days) = 1.6e-3 1/h, (b) k_dif_pc = k_apo_pc1*PC1_ss/PC2_ss = 8.2e-4 1/h, (c) k_mat_pc = k_dif_pc*PC2_ss. Since PC2 to PC1 transition was not considered in the version of the model we can assume that k_apo_pc = k_dif_pc
  k_apo_pc = 0.00082 __h;
  // the value was estimated from [PMID 18487354] only
  kbase_apo_vpc = 0.00082 __h;
  // fitted to describe in vivo viral load dynamics
  kbase_tran_pc_ipc = 4 __pM__h;
  // fitted to describe in vivo viral load dynamics
  kbase_tran_ipc_vpc = 4 __pM__h;
  // rate constant of shedding catalysed by ADAM17/TACE = 5e-4 1/s
  k_shed_ace2_pc = 1.8 __h;
  // k_off for viral Spike receptor binding domain (RBD) and ACE2 receptor
  k_off_cov_ace2 = 23.56 __h;
  // Basing on estimate that virion diameter=120-160 nm and Spike height=20nm we have come to following number of Spikes per virion = 4*3.14*(70 nm)^2/(3.14*(10 nm)^2) = 4*49 = 196. Assuming that "dynamic" diameter of Spike is little bit more we have assumed that there are about 150 spike proteins per 1 virion.
  Num_sp_per_cov = 150 _UL;
  // Kd for viral Spike receptor binding domain (RBD) and ACE2
  Kd_spike_ace2 = 4670 _pM;
  // estimated on the basis of rate constant of endocytosis for Influenza virus
  k_ent_cov_ipc = 0.936 __h;
  // fitted to describe in vivo viral load dynamics averaged across 9 patients
  k_rel_cov_vpc = 2 __h;
  // estimated on the basis of rate constant of endocytosis for Influenza virus: k_end-cyt_Vend in original paper describing release from endosome/uncoating
  k_unc_cov_vpc = 14 __h;
  // fitted to describe in vivo viral load dynamics averaged across 9 patients
  k_rep_cov_rna_vpc = 0.2 __h;
  // it was proposed that a host cell can produce about 8000 (item/cell) virions of Influenza virus before it dies [15384040]. So we have calculated the EC50 basing on the value; taking into account that Vol_pc = 1.33e-12 L/cell we can obtain estimate in pM: EC50 = 8e3 /NA_pmole/Vol_pc = 8e3/6.02e11/1.33e-12 = 9992 pM
  EC50_rep_cov_rna_vpc = 9992 _pM;
  // fitted to describe in vivo viral load dynamics averaged across 9 patients
  k_ass_cov_vpc = 0.39 __h;
  // COV half-life on different surfaces and aerosole is varied from 1 to 8 hours. We have chosen half-life equal to 4 hour. So, rate constant is equal to ln2/4 = 0.17 1/h
  k_deg_cov = 0.17 __h;
  // maximal number of virions Nmax = (surface area of PC faced to alveoli lumen)/(area of "maximal" section of SARS-CoV-2). Based on PC surface area = 183 um^2 [7103258] and (virion diameter=120-160 nm), one obtains Nmax = 183 um^2 / Pi*(140/2 nm) ^2 = 11900
  Nmax_cov_per_cell = 11900 _item__cell;
  // assumed to be equal to COV half-life equal to 4 hour. So, rate constant is equal to ln2/4 = 0.17 1/h
  k_deg_cov_rna = 17 __h;
  // assumed
  T_sw_ir = 50 _h;
  // assumed
  ET50_ir = 190 _h;
  // assumed
  Emax_ir_apo = 700 _UL;
  // assumed
  n_ir = 5 _UL;
  // assumed to be equal to tat presented in the paper for neutralizing mAb
  Kd_anti_Ab = 14300 _pM;
  // For Protective Antigen (PA) for Anthrax vaccine it was measured that concentration of Anti-PA specific IgG in serum is 141.2 ug/mL [15358653]. Taking into account Mr_IgG = 150 kDa, one obtains 141.2 ug/mL =
  anti_Ab_max = 941000 _pM;
  // averaged between type I and II pneumocytes (moved to Const)
  Vol_pc = 1.33e-12 __cell_L;
  L_to_mL = 1000 _mL__L;

  // Assignment rules:
  time_day := time/24;
  k_syn_ace2_pc := k_shed_ace2_pc*ACE2_pc_hs_ss/PC_hs_ss/Vol_pc/Vol_alv/kcell_to_cell;
  k_tran_pc_ipc := kbase_tran_pc_ipc*COV_ACE2_pc/Vol_alv;
  k_tran_ipc_vpc := kbase_tran_ipc_vpc*COV_ipc/Vol_alv;
  VO := anti_Ab/(Kd_anti_Ab + anti_Ab);
  Kd_cov_ace2 := Kd_spike_ace2/Num_sp_per_cov/(1 - VO);
  ACE2_pc_per_cell := NA_pmole*ACE2_pc/PC/Vol_alv/kcell_to_cell;
  COV_ACE2_pc_per_cell := NA_pmole*COV_ACE2_pc/PC/Vol_alv/kcell_to_cell;
  ACE2_ipc_per_cell := NA_pmole*ACE2_ipc/iPC/Vol_alv/kcell_to_cell;
  COV_ACE2_ipc_per_cell := NA_pmole*COV_ACE2_ipc/iPC/Vol_alv/kcell_to_cell;
  COV_ipc_per_cell := NA_pmole*COV_ipc/iPC/Vol_alv/kcell_to_cell;
  ACE2_vpc_per_cell := NA_pmole*ACE2_vpc/vPC/Vol_alv/kcell_to_cell;
  COV_ACE2_vpc_per_cell := NA_pmole*COV_ACE2_vpc/vPC/Vol_alv/kcell_to_cell;
  COV_vpc_per_cell := NA_pmole*COV_vpc/vPC/Vol_alv/kcell_to_cell;
  COVass_vpc_per_cell := NA_pmole*COVass_vpc/vPC/Vol_alv/kcell_to_cell;
  COV_RNA_vpc_per_cell := NA_pmole*COV_RNA_vpc/vPC/Vol_alv/kcell_to_cell;
  COV_num_sputum_ml := sputum_dilution_coef*(COV + COV_RNA)*NA_pmole/L_to_mL;
  PC_tot := PC + iPC + vPC;
  PC_percent := 100*PC/PC_tot;
  iPC_percent := 100*iPC/PC_tot;
  vPC_percent := 100*vPC/PC_tot;
  ACE2_pc_per_cell_tot := ACE2_pc_per_cell + COV_ACE2_pc_per_cell;
  ACE2_ipc_per_cell_tot := ACE2_ipc_per_cell + COV_ACE2_ipc_per_cell;
  ACE2_vpc_per_cell_tot := ACE2_vpc_per_cell + COV_ACE2_vpc_per_cell;
  COV_pc_per_cell_tot := COV_ACE2_pc_per_cell;
  COV_ipc_per_cell_tot := COV_ACE2_ipc_per_cell + COV_ipc_per_cell;
  COV_vpc_per_cell_tot := COV_ACE2_vpc_per_cell + COV_vpc_per_cell + COV_RNA_vpc_per_cell;
  steric_factor_pc := 1 - COV_ACE2_pc_per_cell/Nmax_cov_per_cell;
  steric_factor_ipc := 1 - COV_ACE2_ipc_per_cell/Nmax_cov_per_cell;
  steric_factor_vpc := 1 - COV_ACE2_vpc_per_cell/Nmax_cov_per_cell;
  COV_sgRNA_perc := 100*COV_RNA/(COV + COV_RNA);
  IR_apo := 1 + switch_ir*Emax_ir_apo*(time/T_sw_ir - 1)^n_ir/((1 + ET50_ir/T_sw_ir)^n_ir + (time/T_sw_ir - 1)^n_ir);
  k_apo_vpc := kbase_apo_vpc*IR_apo;
  anti_Ab := switch_ir*anti_Ab_max*(time/T_sw_ir - 1)^n_ir/((1 + ET50_ir/T_sw_ir)^n_ir + (time/T_sw_ir - 1)^n_ir);

  // Reactions:
  V_mat_pc: -> PC; Vol_alv*k_apo_pc*PC_hs_ss; V_mat_pc is "influx of Pneumocytes via maturation";  // modifiers: PC_hs_ss
  V_tran_pc_ipc: PC -> iPC; Vol_alv*k_tran_pc_ipc*PC; V_tran_pc_ipc is "transition of Pneumocyte from normal state to state with entered COV";
  V_tran_ipc_vpc: iPC -> vPC; Vol_alv*k_tran_ipc_vpc*iPC; V_tran_ipc_vpc is "transition of Pneumocyte from state with entered COV to state able to produce viral particles";
  V_apo_pc: PC -> ; Vol_alv*k_apo_pc*PC; V_apo_pc is "apoptosis of Pneumocyte";
  V_apo_ipc: iPC -> ; Vol_alv*k_apo_pc*iPC; V_apo_ipc is "apoptosis of iPneumocyte";
  V_apo_vpc: vPC -> ; Vol_alv*k_apo_vpc*vPC; V_apo_vpc is "apoptosis of vPneumocyte";
  V_syn_ace2_pc: -> ACE2_pc; Vol_pc*k_syn_ace2_pc*PC*Vol_alv*kcell_to_cell; V_syn_ace2_pc is "synthesis of ACE2 by PC";  // modifiers: PC
  V_shed_ace2_pc: ACE2_pc -> ; k_shed_ace2_pc*ACE2_pc; V_shed_ace2_pc is "degradation of ACE2 located at PC via shedding";
  V_bind_cov_ace2_pc: COV + ACE2_pc -> COV_ACE2_pc; k_off_cov_ace2*(steric_factor_pc*COV*ACE2_pc/Kd_cov_ace2 - COV_ACE2_pc); V_bind_cov_ace2_pc is "binding of COV to ACE2 located at PC surface";
  V_deg_ace2_apo_pc: ACE2_pc -> ; k_apo_pc*ACE2_pc; V_deg_ace2_apo_pc is "degradation of ACE2 located at PC via PC apoptosis";
  V_deg_cov_ace2_apo_pc: COV_ACE2_pc -> COV; k_apo_pc*COV_ACE2_pc; V_deg_cov_ace2_apo_pc is "degradation of COV_ACE2 located at PC via PC apoptosis with concomitant COV release";
  V_tran_ace2_pc_ipc: ACE2_pc -> ACE2_ipc; k_tran_pc_ipc*ACE2_pc; V_tran_ace2_pc_ipc is "transition of ACE2 from PC to iPC with transition of pneumocytes between the states";
  V_tran_cov_ace2_pc_ipc: COV_ACE2_pc -> COV_ACE2_ipc; k_tran_pc_ipc*COV_ACE2_pc; V_tran_cov_ace2_pc_ipc is "transition of COV_ACE2 from PC to iPC with transition of pneumocytes between the states";
  V_syn_ace2_ipc: -> ACE2_ipc; Vol_pc*k_syn_ace2_pc*iPC*Vol_alv*kcell_to_cell; V_syn_ace2_ipc is "synthesis of ACE2 by iPC";  // modifiers: iPC
  V_shed_ace2_ipc: ACE2_ipc -> ; k_shed_ace2_pc*ACE2_ipc; V_shed_ace2_ipc is "degradation of ACE2 located at iPC via shedding";
  V_bind_cov_ace2_ipc: COV + ACE2_ipc -> COV_ACE2_ipc; k_off_cov_ace2*(steric_factor_ipc*COV*ACE2_ipc/Kd_cov_ace2 - COV_ACE2_ipc); V_bind_cov_ace2_ipc is "binding of COV to ACE2 located at iPC surface";
  V_deg_ace2_apo_ipc: ACE2_ipc -> ; k_apo_pc*ACE2_ipc; V_deg_ace2_apo_ipc is "degradation of ACE2 located at iPC via iPC apoptosis";
  V_deg_cov_ace2_apo_ipc: COV_ACE2_ipc -> COV; k_apo_pc*COV_ACE2_ipc; V_deg_cov_ace2_apo_ipc is "degradation of COV_ACE2 located at iPC via iPC apoptosis with concomitant COV release";
  V_deg_cov_apo_ipc: COV_ipc -> ; k_apo_pc*COV_ipc; V_deg_cov_apo_ipc is "degradation of COV located in iPC via iPC apoptosis";
  V_ent_cov_ipc: COV_ACE2_ipc -> COV_ipc; k_ent_cov_ipc*COV_ACE2_ipc; V_ent_cov_ipc is "entry of COV into iPC with concomitant ACE2 degradation";
  V_tran_ace2_ipc_vpc: ACE2_ipc -> ACE2_vpc; k_tran_ipc_vpc*ACE2_ipc; V_tran_ace2_ipc_vpc is "transition of ACE2 from iPC to vPC with transition of pneumocytes between the states";
  V_tran_cov_ace2_ipc_vpc: COV_ACE2_ipc -> COV_ACE2_vpc; k_tran_ipc_vpc*COV_ACE2_ipc; V_tran_cov_ace2_ipc_vpc is "transition of COV_ACE2 from iPC to vPC with transition of pneumocytes between the states";
  V_tran_cov_ipc_vpc: COV_ipc -> COV_vpc; k_tran_ipc_vpc*COV_ipc; V_tran_cov_ipc_vpc is "transition of COV from iPC to vPC with transition of pneumocytes between the states";
  V_syn_ace2_vpc: -> ACE2_vpc; Vol_pc*k_syn_ace2_pc*vPC*Vol_alv*kcell_to_cell; V_syn_ace2_vpc is "synthesis of ACE2 by vPC";  // modifiers: vPC
  V_shed_ace2_vpc: ACE2_vpc -> ; k_shed_ace2_pc*ACE2_vpc; V_shed_ace2_vpc is "degradation of ACE2 located at vPC via shedding";
  V_bind_cov_ace2_vpc: COV + ACE2_vpc -> COV_ACE2_vpc; k_off_cov_ace2*(steric_factor_vpc*COV*ACE2_vpc/Kd_cov_ace2 - COV_ACE2_vpc); V_bind_cov_ace2_vpc is "binding of COV to ACE2 located at vPC surface";
  V_deg_ace2_apo_vpc: ACE2_vpc -> ; k_apo_vpc*ACE2_vpc; V_deg_ace2_apo_vpc is "degradation of ACE2 located at iPC via vPC apoptosis";
  V_deg_cov_ace2_apo_vpc: COV_ACE2_vpc -> COV; k_apo_vpc*COV_ACE2_vpc; V_deg_cov_ace2_apo_vpc is "degradation of COV_ACE2 located at vPC via vPC apoptosis with concomitant COV release";
  V_ent_cov_vpc: COV_ACE2_vpc -> COV_vpc; k_ent_cov_ipc*COV_ACE2_vpc; V_ent_cov_vpc is "entry of COV into vPC with concomitant ACE2 degradation";
  V_unc_cov_vpc: COV_vpc -> COV_RNA_vpc; k_unc_cov_vpc*COV_vpc; V_unc_cov_vpc is "uncoating of COV in vPC";
  V_rep_cov_rna_vpc: -> COV_RNA_vpc; k_rep_cov_rna_vpc*COV_RNA_vpc/(1 + COV_RNA_vpc/(vPC*Vol_alv*kcell_to_cell)/Vol_pc/EC50_rep_cov_rna_vpc); V_rep_cov_rna_vpc is "replication of COV_RNA in vPC";  // modifiers: vPC
  V_ass_cov_vpc: COV_RNA_vpc -> COVass_vpc; k_ass_cov_vpc*COV_RNA_vpc; V_ass_cov_vpc is "assembling of COV in vPC";
  V_rel_cov_vpc: COVass_vpc -> COV; k_rel_cov_vpc*COVass_vpc; V_rel_cov_vpc is "release of COV in vPC";
  V_deg_cov_apo_vpc: COV_vpc -> ; k_apo_vpc*COV_vpc; V_deg_cov_apo_vpc is "degradation of COV located in vPC via vPC apoptosis";
  V_deg_cov_ass_apo_vpc: COVass_vpc -> COV; k_apo_vpc*COVass_vpc; V_deg_cov_ass_apo_vpc is "degradation of COVass located in vPC via vPC apoptosis with concomitant COV release";
  V_deg_cov_rna_apo_vpc: COV_RNA_vpc -> COV_RNA; k_apo_vpc*COV_RNA_vpc; V_deg_cov_rna_apo_vpc is "degradation of COV_RNA located at vPC with concomitant COV_RNA release to bulk phase via vPC apoptosis";
  V_deg_cov: COV -> ; Vol_alv*k_deg_cov*COV; V_deg_cov is "degradation of COV in bulk phase";
  V_deg_cov_rna: COV_RNA -> ; Vol_alv*k_deg_cov_rna*COV_RNA; V_deg_cov_rna is "degradation of COV_RNA in bulk phase";

  // Events:
  viral_load: at (true && (time >= T_sw_ir)): switch_ir = 1;

  // Unit definitions:
  unit _hour = 3600 second;
  unit __kcell_cell = 1e-3 dimensionless; __kcell_cell is "cell/kcell";
  unit __pmole_item = item / (1e-12 mole); __pmole_item is "item/pmole";
  unit _UL = dimensionless;
  unit __h = 1 / (3600 second); __h is "1/h";
  unit __pM__h = litre / (1e-12 mole * 3600 second); __pM__h is "1/pM/h";
  unit _pM = 1e-12 mole / litre;
  unit _item__cell = dimensionless; _item__cell is "item/cell";
  unit _h = 3600 second;
  unit __cell_L = litre / item; __cell_L is "L/cell";
  unit _mL__L = 1e-3 dimensionless; _mL__L is "mL/L";
  unit _day = 86400 second;
  unit _pM__h = 1e-12 mole / (litre * 3600 second); _pM__h is "pM/h";
  unit __mL_item = item / (1e-3 litre); __mL_item is "item/mL";
  unit _kcell__L = 1000 item / litre; _kcell__L is "kcell/L";
  unit _L = litre;
  unit _kcell = 1000 item;
  unit _pmole = 1e-12 mole;
  unit _pM_L = 1e-12 mole; _pM_L is "pM*L";
  unit _kcell__h = 1000 item / (3600 second); _kcell__h is "kcell/h";
  unit _pmole__h = 1e-12 mole / (3600 second); _pmole__h is "pmole/h";
end
